ω := [0; 0; ω_z]  # error: Эта переменная не определена.
r'(t) := [d/dt(r_x(t)); d/dt(r_y(t)); d/dt(r_z(t))]  # error: Эта переменная не определена.
r(t) := [r_x(t); r_y(t); r_z(t)]  # error: Эта переменная не определена.
(-m*ω)×(ω×r(t)) - 2*m*(ω×r'(t)) → [m*r_x(t)*ω_z^2 + 2*m*d/dt(r_y(t))*ω_z; m*ω_z^2*r_y(t) - 2*m*ω_z*d/dt(r_x(t)); 0]
m := 1
ω_z := 2*π
T := 1
Given
rx''(t) == rx(t)*ω_z^2 + 2*ry'(t)*ω_z
ry''(t) == ry(t)*ω_z^2 - 2*rx'(t)*ω_z
rx(0) == 0
rx'(0) == 0
ry(0) == 0
ry'(0) == 0.1
[r_x; r_y] := Odesolve([rx; ry], t, T, 200)
t := 0, T/200 .. T
b := 0.09
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